# OpenSim document version 40500
InverseKinematicsTool:
  time_range: 0 2
  marker_file: keypoints_3d.trc
  IKTaskSet:
    IKMarkerTask nose: apply=false weight=1
    IKMarkerTask left_shoulder: apply=true weight=1
    IKMarkerTask right_shoulder: apply=true weight=1
    IKMarkerTask left_elbow: apply=true weight=1
    IKMarkerTask right_elbow: apply=true weight=1
    IKMarkerTask left_wrist: apply=true weight=1
    IKMarkerTask right_wrist: apply=true weight=1
    IKMarkerTask left_hip: apply=true weight=1
    IKMarkerTask right_hip: apply=true weight=1
    IKMarkerTask left_knee: apply=true weight=1
    IKMarkerTask right_knee: apply=true weight=1
    IKMarkerTask left_ankle: apply=true weight=1
    IKMarkerTask right_ankle: apply=true weight=1
    IKMarkerTask right_hand_index1: apply=false weight=1
    IKMarkerTask right_hand_pinky1: apply=false weight=1
    IKMarkerTask left_hand_pinky1: apply=false weight=1
    IKMarkerTask left_hand_index1: apply=false weight=1
