# OpenSim document version 40500
ScaleTool Pose2Sim-scaled:
  mass: 83.9782 [kg]
  height: -1
  age: -1
  ModelScaler:
    apply: true
    scaling_order: measurements
    marker_file: keypoints_3d.trc
    time_range: 0 2
    preserve_mass_distribution: true
    MeasurementSet:
      Measurement thorso: apply=true
        MarkerPair: markers=(left_shoulder right_shoulder)
        BodyScale torso: axes=(X Y Z)
      Measurement lower_arm_l: apply=true
        MarkerPair: markers=(left_elbow left_wrist)
        BodyScale ulna_l: axes=(X Y Z)
        BodyScale radius_l: axes=(X Y Z)
      Measurement arm_l: apply=true
        MarkerPair: markers=(left_shoulder left_elbow)
        BodyScale humerus_l: axes=(X Y Z)
      Measurement lower_arm_r: apply=true
        MarkerPair: markers=(right_elbow right_wrist)
        BodyScale ulna_r: axes=(X Y Z)
        BodyScale radius_r: axes=(X Y Z)
      Measurement arm_r: apply=true
        MarkerPair: markers=(right_shoulder right_elbow)
        BodyScale humerus_r: axes=(X Y Z)
  MarkerPlacer:
    apply: true
    marker_file: keypoints_3d.trc
    time_range: 0 1
    max_marker_movement: -1
    IKTaskSet:
      IKMarkerTask nose: apply=false weight=1
      IKMarkerTask left_shoulder: apply=true weight=1
      IKMarkerTask right_shoulder: apply=true weight=1
      IKMarkerTask left_elbow: apply=true weight=1
      IKMarkerTask right_elbow: apply=true weight=1
      IKMarkerTask left_wrist: apply=true weight=1
      IKMarkerTask right_wrist: apply=true weight=1
      IKMarkerTask left_hip: apply=true weight=1
      IKMarkerTask right_hip: apply=true weight=1
      IKMarkerTask left_knee: apply=true weight=1
      IKMarkerTask right_knee: apply=true weight=1
      IKMarkerTask left_ankle: apply=true weight=1
      IKMarkerTask right_ankle: apply=true weight=1
      IKMarkerTask left_big_toe: apply=false weight=1
      IKMarkerTask left_small_toe: apply=false weight=1
      IKMarkerTask left_heel: apply=false weight=1
      IKMarkerTask right_big_toe: apply=false weight=1
      IKMarkerTask right_small_toe: apply=false weight=1
      IKMarkerTask right_heel: apply=false weight=1
      IKMarkerTask right_hand_index1: apply=false weight=1
      IKMarkerTask right_hand_pinky1: apply=false weight=1
      IKMarkerTask left_hand_pinky1: apply=false weight=1
      IKMarkerTask left_hand_index1: apply=false weight=1
