# OpenSim document version 40500
ScaleTool WU_upper_limb_model_modified-scaled:
  mass: 33.0878 [kg]
  height: -1
  age: -1
  ModelScaler:
    apply: true
    scaling_order: measurements
    marker_file: ../../../../Downloads/20260811_123353(1)/results/keypoints_3d.trc
    time_range: 0 0.5
    preserve_mass_distribution: false
    MeasurementSet:
      Measurement clav: apply=true
        MarkerPair: markers=(left_shoulder right_shoulder)
        BodyScale thorax: axes=(X Y Z)
        BodyScale clavicle: axes=(X Y Z)
        BodyScale clavicle_left: axes=(X Y Z)
      Measurement hum_l: apply=true
        MarkerPair: markers=(left_shoulder left_elbow)
        BodyScale humerus_left: axes=(X Y Z)
      Measurement hum_r: apply=true
        MarkerPair: markers=(right_shoulder right_elbow)
        BodyScale humerus: axes=(X Y Z)
      Measurement larm_l: apply=true
        MarkerPair: markers=(left_elbow left_wrist)
        BodyScale ulna_left: axes=(X Y Z)
        BodyScale radius_left: axes=(X Y Z)
      Measurement larm_r: apply=true
        MarkerPair: markers=(right_elbow right_wrist)
        BodyScale ulna: axes=(X Y Z)
        BodyScale radius: axes=(X Y Z)
  MarkerPlacer:
    apply: true
    marker_file: ../../../../Downloads/20260811_123353(1)/results/keypoints_3d.trc
    time_range: 0 0.5
    max_marker_movement: -1
    IKTaskSet:
      IKMarkerTask nose: apply=true weight=1
      IKMarkerTask left_eye: apply=true weight=1
      IKMarkerTask right_eye: apply=true weight=1
      IKMarkerTask left_shoulder: apply=true weight=1
      IKMarkerTask right_shoulder: apply=true weight=1
      IKMarkerTask left_elbow: apply=true weight=1
      IKMarkerTask right_elbow: apply=true weight=1
      IKMarkerTask left_wrist: apply=true weight=1
      IKMarkerTask right_wrist: apply=true weight=1
      IKMarkerTask right_hand_index1: apply=true weight=0.5
      IKMarkerTask right_hand_pinky1: apply=true weight=0.5
      IKMarkerTask left_hand_pinky1: apply=true weight=0.5
      IKMarkerTask left_hand_index1: apply=true weight=0.5
      IKMarkerTask virtual_marker_0: apply=true weight=0.5
      IKMarkerTask virtual_marker_1: apply=true weight=0.5
      IKMarkerTask virtual_marker_2: apply=true weight=0.5
      IKMarkerTask virtual_marker_3: apply=true weight=0.5
      IKMarkerTask left_ear: apply=true weight=1
      IKMarkerTask ster: apply=true weight=0.5
