# OpenSim document version 40500
ScaleTool WU_upper_limb_model_modified-scaled:
  mass: 33.0878 [kg]
  height: -1
  age: -1
  ModelScaler:
    apply: true
    scaling_order: measurements
    marker_file: DrinkingLeftArm_processed.trc
    time_range: 0 0.5
    preserve_mass_distribution: false
    MeasurementSet:
      Measurement th_x: apply=true
        MarkerPair: markers=(c7 ster)
        MarkerPair: markers=(t10 xiph)
        BodyScale thorax: axes=X
      Measurement th_y: apply=true
        MarkerPair: markers=(ster xiph)
        MarkerPair: markers=(c7 t10)
        BodyScale thorax: axes=Y
      Measurement th_z: apply=true
        MarkerPair: markers=(clav_ac_r clav_ac_l)
        BodyScale thorax: axes=Z
      Measurement clav_l: apply=true
        MarkerPair: markers=(clav_sc_l clav_ac_l)
        BodyScale clavicle_left: axes=(X Y Z)
      Measurement clav_r: apply=true
        MarkerPair: markers=(clav_sc_r clav_ac_r)
        BodyScale clavicle: axes=(X Y Z)
      Measurement hum_l: apply=true
        MarkerPair: markers=(scap_l epic_lat_l)
        BodyScale humerus_left: axes=(X Y Z)
      Measurement hum_r: apply=true
        MarkerPair: markers=(scap_r epic_lat_r)
        BodyScale humerus: axes=(X Y Z)
      Measurement ulna_l: apply=true
        MarkerPair: markers=(epic_lat_l styl_u_l)
        BodyScale ulna_left: axes=(X Y Z)
      Measurement ulna_r: apply=true
        MarkerPair: markers=(epic_lat_r styl_u_r)
        BodyScale ulna: axes=(X Y Z)
      Measurement radius_l: apply=true
        MarkerPair: markers=(epic_m_l styl_r_l)
        BodyScale radius_left: axes=(X Y Z)
      Measurement radius_r: apply=true
        MarkerPair: markers=(epic_m_r styl_r_r)
        BodyScale radius: axes=(X Y Z)
  MarkerPlacer:
    apply: true
    marker_file: DrinkingLeftArm_processed.trc
    time_range: 0 0.5
    max_marker_movement: -1
    IKTaskSet:
      IKMarkerTask ster: apply=true weight=1
      IKMarkerTask xiph: apply=true weight=1
      IKMarkerTask c7: apply=true weight=1
      IKMarkerTask t10: apply=true weight=1
      IKMarkerTask epic_lat_r: apply=true weight=1
      IKMarkerTask epic_m_r: apply=true weight=1
      IKMarkerTask styl_r_r: apply=true weight=1
      IKMarkerTask styl_u_r: apply=true weight=1
      IKMarkerTask scap_r: apply=true weight=1
      IKMarkerTask elb_r: apply=true weight=1
      IKMarkerTask clav_sc_r: apply=true weight=1
      IKMarkerTask clav_ac_r: apply=true weight=1
      IKMarkerTask clav_sc_l: apply=true weight=1
      IKMarkerTask clav_ac_l: apply=true weight=1
      IKMarkerTask scap_l: apply=true weight=1
      IKMarkerTask epic_lat_l: apply=true weight=1
      IKMarkerTask epic_m_l: apply=true weight=1
      IKMarkerTask elb_l: apply=true weight=1
      IKMarkerTask styl_r_l: apply=true weight=1
      IKMarkerTask styl_u_l: apply=true weight=1
      IKMarkerTask head_f: apply=true weight=1
      IKMarkerTask head_l: apply=true weight=1
      IKMarkerTask head_r: apply=true weight=1
      IKMarkerTask p2_l: apply=true weight=1
      IKMarkerTask p5_l: apply=true weight=1
      IKMarkerTask hand_l: apply=true weight=1
      IKMarkerTask p5_r: apply=true weight=1
      IKMarkerTask hand_r: apply=true weight=1
      IKMarkerTask p2_r: apply=true weight=1
      IKMarkerTask ribs_r: apply=true weight=1
      IKMarkerTask ribs_l: apply=true weight=1
