# OpenSim document version 40500
Model WU_upper_limb_model_modified:
  gravity: 0 0 -9.8
  Ground
  BodySet:
    Body thorax: mass=20 [kg] mass_center=(-0.0591 -0.01486 0) inertia=(1.29841 0.35245 1.29841 0 0 0)
        meshes=(thorax.vtp hat_spine.vtp)
      WrapCylinder SpineCyl: xyz_body_rotation=(1.57 0 0) translation=(-0.0467625 0.0898259 0.0181467) quadrant=-x
          radius=0.01495603 length=0.0797655
      WrapCylinder SpineCyl2: xyz_body_rotation=(1.57 -1.2 0) translation=(-0.0467625 0.0300018 0.0239297) quadrant=-x
          radius=0.01994138 length=0.1495603
      WrapCylinder SpineCyl2_RMN: xyz_body_rotation=(1.57 -1.2 0) translation=(-0.0467625 0.0300018 0.0239297)
          quadrant=-x radius=0.01994138 length=0.1495603
      WrapCylinder SpineCyl3: xyz_body_rotation=(1.57 -0.21 0) translation=(-0.0856482 -0.0748699 0.0239297)
          quadrant=-x radius=0.01994138 length=0.1894431
      WrapCylinder SpineCyl3_RMJ1: xyz_body_rotation=(1.57 -0.21 0) translation=(-0.0856482 -0.0748699 0.0239297)
          quadrant=-x radius=0.01994138 length=0.1894431
      WrapCylinder SpineCyl3_RMJ2: xyz_body_rotation=(1.57 -0.21 -0.4) translation=(-0.0756482 -0.0748699 0.0239297)
          quadrant=-x radius=0.02594138 length=0.1894431
      WrapCylinder SpineCyl3_RMJ2_1: xyz_body_rotation=(1.57 -0.21 0.4) translation=(-0.07726668 -0.0748699 0.0239297)
          quadrant=-x radius=0.01994138 length=0.1894431
      WrapEllipsoid ThoraxSRA: xyz_body_rotation=(0 -0.331962 0.139892) translation=(-0.0384869 -0.0930265 0.0648095)
          quadrant=all dimensions=(0.0498534 0.0997069 0.0648095)
      WrapEllipsoid ThoraxSRA_SRA2: xyz_body_rotation=(0 -0.331962 0.139892)
          translation=(-0.0384869 -0.0930265 0.0648095) quadrant=+z dimensions=(0.0498534 0.0997069 0.0648095)
      WrapCylinder SRACyl: xyz_body_rotation=(-1.57 -0.331962 0.6) translation=(-0.02715599 -0.06867068 0.07438272)
          quadrant=-x radius=0.0492 length=0.08
      WrapEllipsoid ThoraxSRA2: xyz_body_rotation=(0 -0.431962 0.139892)
          translation=(-0.008761958 -0.116956 0.07033409) quadrant=z dimensions=(0.0666674 0.109678 0.0648095)
      WrapCylinder SRACyl_SRA2: xyz_body_rotation=(-1.4 0.431962 1) translation=(-0.03848692 -0.08874594 0.0820418)
          quadrant=-x radius=0.04500199 length=0.07955042
      WrapCylinder SRACyl_SRA2_2: xyz_body_rotation=(-1.57 -0.531962 1.6) translation=(-0.014002 -0.092702 0.0820418)
          quadrant=-x radius=0.04945531 length=0.07955042
      WrapEllipsoid ThoraxLAT: xyz_body_rotation=(0 -0.431962 0.139892) translation=(-0.0335015 -0.142581 0.0648095)
          quadrant=all dimensions=(0.0747802 0.109678 0.0648095)
    Body head: mass=4.2778 mass_center=(0.01606673 0.05850891 0) inertia=(0.01149092 0.008314703 0.01253026 0 0 0)
        meshes=(hat_jaw.vtp hat_skull.vtp)
    Body clavicle: mass=0.2 mass_center=(-0.0122396 0.00817425 0.0634902) inertia=(0 0 0 0 0 0) meshes=clavicle.vtp
    Body scapula: mass=0.5 mass_center=(-0.0826627 -0.0447756 -0.0746261) inertia=(0 0 0 0 0 0) meshes=scapula.vtp
      WrapCylinder INFSPCyl: xyz_body_rotation=(0.55 2.3 0.95) translation=(-0.064408 -0.049 -0.0128586) quadrant=-x
          radius=0.009 length=0.08
    Body humerus: mass=2.0325 mass_center=(0 -0.16402 0) inertia=(0.0118761 0.00409688 0.0133305 0 0 0)
        meshes=humerus.vtp
      WrapTorus WP_humerus_torus_BICl: xyz_body_rotation=(0.2 0.4 0) translation=(0 0.01 0) quadrant=+z
          inner_radius=0.023 outer_radius=0.03
      WrapTorus WP_humerus_torus_middle: xyz_body_rotation=(1.57 0 0) translation=(0 -0.1 0) quadrant=all
          inner_radius=0.025 outer_radius=0.05
      WrapTorus WP_humerus_torus_middle_b: xyz_body_rotation=(1.57 0 0) translation=(0 -0.1 0) quadrant=+z
          inner_radius=0.018 outer_radius=0.051
      WrapEllipsoid SUPSP: xyz_body_rotation=(0.0380482 0.00855211 -1.30673)
          translation=(0.000199414 0.00767743 0.0042874) quadrant=all dimensions=(0.0199414 0.0199414 0.0199414)
      WrapCylinder INFSP_and_TMIN_hum: xyz_body_rotation=(1.5 -0.5 -0.1)
          translation=(0.001299121 0.00159238 0.00378886) quadrant=-x radius=0.023 length=0.04
      WrapSphere TMAJ_LAT_PEC_CORBhh: translation=(0.000299121 -0.00897362 0.00598241) quadrant=all radius=0.02442818
      WrapCylinder CORBhum: xyz_body_rotation=(-1.60832 0.0959931 0.875283)
          translation=(0.00269209 -0.119848 -0.00588271) quadrant=x radius=0.00797655 length=0.04985344
      WrapEllipsoid TRIlonghh: xyz_body_rotation=(3.00162 -0.853466 2.57419)
          translation=(-0.00777714 -0.00408798 -0.0013959) quadrant=z dimensions=(0.0448974 0.0199414 0.0199414)
      WrapEllipsoid Elbow_BIC_BRD: xyz_body_rotation=(-0.128631 0.137532 0.0307178)
          translation=(0.00189443 -0.288153 -0.013959) quadrant=x dimensions=(0.014956 0.014956 0.0997069)
      WrapEllipsoid Elbow_BIC_BRD_b: xyz_body_rotation=(-0.128631 0.137532 0.0307178)
          translation=(0.00189443 -0.288153 -0.013959) quadrant=x dimensions=(0.014956 0.014956 0.0997069)
    Body ulna: mass=0.6075 mass_center=(0 -0.123087 0) inertia=(0.00308928 0.000644555 0.00335106 0 0 0)
        meshes=ulna.vtp
      WrapCylinder WP_ulna_TRI: xyz_body_rotation=(-0.015 -0.025 0.3) translation=(0 0 0) quadrant=y radius=0.025
          length=0.04
    Body radius: mass=0.6075 mass_center=(0 -0.123087 0) inertia=(0.00308928 0.000644555 0.00335106 0 0 0)
        meshes=radius.vtp
    Body hand_r: mass=0.4575 mass_center=(0 -0.068095 0) inertia=(0.000892 0.000547 0.00134 0 0 0)
        meshes=(pisiform.vtp scaphoid.vtp triquetrum.vtp hamate.vtp capitate.vtp trapezoid.vtp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)
    Body clavicle_left: mass=0.2 mass_center=(-0.0122396 0.00817425 0.0634902) inertia=(0 0 0 0 0 0)
        meshes=clavicle_left.vtp
    Body scapula_left: mass=0.5 mass_center=(-0.0826627 -0.0447756 -0.0746261) inertia=(0 0 0 0 0 0)
        meshes=scapula_left.vtp
      WrapCylinder INFSPCyl_left: xyz_body_rotation=(-0.55 -2.3 0.95) translation=(-0.064408 -0.049 0.0128586)
          quadrant=-x radius=0.009 length=0.08
    Body humerus_left: mass=2.0325 mass_center=(0 -0.16402 0) inertia=(0.0118761 0.00409688 0.0133305 0 0 0)
        meshes=humerus_left.vtp
      WrapTorus WP_humerus_torus_BICl_left: xyz_body_rotation=(-0.2 -0.4 0) translation=(0 0.01 0) quadrant=+z
          inner_radius=0.023 outer_radius=0.03
      WrapTorus WP_humerus_torus_middle_left: xyz_body_rotation=(-1.57 0 0) translation=(0 -0.1 0) quadrant=all
          inner_radius=0.025 outer_radius=0.05
      WrapTorus WP_humerus_torus_middle_b_left: xyz_body_rotation=(-1.57 0 0) translation=(0 -0.1 0) quadrant=+z
          inner_radius=0.018 outer_radius=0.051
      WrapEllipsoid SUPSP_left: xyz_body_rotation=(-0.0380482 -0.00855211 -1.30673)
          translation=(0.000199414 0.00767743 -0.0042874) quadrant=all dimensions=(0.0199414 0.0199414 0.0199414)
      WrapCylinder INFSP_and_TMIN_hum_left: xyz_body_rotation=(-1.5 0.5 -0.1)
          translation=(0.001299121 0.00159238 -0.00378886) quadrant=-x radius=0.023 length=0.04
      WrapSphere TMAJ_LAT_PEC_CORBhh_left: translation=(0.000299121 -0.00897362 -0.00598241) quadrant=all
          radius=0.02442818
      WrapCylinder CORBhum_left: xyz_body_rotation=(1.60832 -0.0959931 0.875283)
          translation=(0.00269209 -0.119848 0.00588271) quadrant=x radius=0.00797655 length=0.04985344
      WrapEllipsoid TRIlonghh_left: xyz_body_rotation=(-3.00162 0.853466 2.57419)
          translation=(-0.00777714 -0.00408798 0.0013959) quadrant=z dimensions=(0.0448974 0.0199414 0.0199414)
      WrapEllipsoid Elbow_BIC_BRD_left: xyz_body_rotation=(0.128631 -0.137532 0.0307178)
          translation=(0.00189443 -0.288153 0.013959) quadrant=x dimensions=(0.014956 0.014956 0.0997069)
      WrapEllipsoid Elbow_BIC_BRD_b_left: xyz_body_rotation=(0.128631 -0.137532 0.0307178)
          translation=(0.00189443 -0.288153 0.013959) quadrant=x dimensions=(0.014956 0.014956 0.0997069)
    Body ulna_left: mass=0.6075 mass_center=(0 -0.123087 0) inertia=(0.00308928 0.000644555 0.00335106 0 0 0)
        meshes=ulna_left.vtp
      WrapCylinder WP_ulna_TRI_left: xyz_body_rotation=(0.015 0.025 0.3) translation=(0 0 0) quadrant=y radius=0.025
          length=0.04
    Body radius_left: mass=0.6075 mass_center=(0 -0.123087 0) inertia=(0.00308928 0.000644555 0.00335106 0 0 0)
        meshes=radius_left.vtp
    Body hand_left: mass=0.4575 mass_center=(0 -0.068095 0) inertia=(0.000892 0.000547 0.00134 0 0 0)
        meshes=(pisiform_lvs.vtp lunate_lvs.vtp scaphoid_lvs.vtp triquetrum_lvs.vtp hamate_lvs.vtp capitate_lvs.vtp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)
  JointSet:
    CustomJoint ground_thorax: socket_parent_frame=ground_offset socket_child_frame=thorax_offset
      Coordinate thorax_tilt: default_value=1.82563 range=(-3.5708 3.5708) clamped=true
      Coordinate thorax_list: default_value=1.959229 range=(-3.5708 3.5708) clamped=true
      Coordinate thorax_rotation: default_value=-1.82447 range=(-3.5708 3.5708) clamped=true
      Coordinate thorax_tx: default_value=0.002910422 range=(-20 20) clamped=true
      Coordinate thorax_ty: default_value=0.585077 range=(-10 10) clamped=true
      Coordinate thorax_tz: default_value=0.9765827 range=(-10 10) clamped=true
      PhysicalOffsetFrame ground_offset: socket_parent=/ground translation=(0 0 0) [meters]
      PhysicalOffsetFrame thorax_offset: socket_parent=/bodyset/thorax translation=(0 0 0)
      SpatialTransform:
        TransformAxis rotation1: coordinates=thorax_tilt axis=(0 0 1) LinearFunction(coefficients=1 0)
        TransformAxis rotation2: coordinates=thorax_list axis=(1 0 0) LinearFunction(coefficients=1 0)
        TransformAxis rotation3: coordinates=thorax_rotation axis=(0 1 0) LinearFunction(coefficients=1 0)
        TransformAxis translation1: coordinates=thorax_tx axis=(1 0 0)
            MultiplierFunction(scale=1, LinearFunction(coefficients=1 0))
        TransformAxis translation2: coordinates=thorax_ty axis=(0 1 0)
            MultiplierFunction(scale=1, LinearFunction(coefficients=1 0))
        TransformAxis translation3: coordinates=thorax_tz axis=(0 0 1)
            MultiplierFunction(scale=1, LinearFunction(coefficients=1 0))
    CustomJoint head_torso: socket_parent_frame=thorax_offset socket_child_frame=head_offset
      Coordinate neck_flexion: default_value=0 range=(-0.5 0.5) clamped=true
      Coordinate neck_bending: default_value=0 range=(-0.5707963 0.5707963) clamped=true
      Coordinate neck_rotation: default_value=0 range=(-0.785398 0.785398) clamped=true
      PhysicalOffsetFrame thorax_offset: socket_parent=/bodyset/thorax translation=(0 0.15 0)
      PhysicalOffsetFrame head_offset: socket_parent=/bodyset/head translation=(0 0.541458 0)
      SpatialTransform: axes_held_at_zero=(translation1 translation2 translation3)
        TransformAxis rotation1: coordinates=neck_flexion axis=(0 0 1) LinearFunction(coefficients=1 0)
        TransformAxis rotation2: coordinates=neck_bending axis=(1 0 0) LinearFunction(coefficients=1 0)
        TransformAxis rotation3: coordinates=neck_rotation axis=(0 1 0) LinearFunction(coefficients=1 0)
    CustomJoint SCJ: socket_parent_frame=thorax_offset socket_child_frame=clavicle_offset
      Coordinate sternoclavicular_r1: default_value=0.1640103 range=(-0.7 0.7) clamped=true
      Coordinate sternoclavicular_r2: default_value=-0.1662541 range=(-0.35 0.7) clamped=true
      Coordinate sternoclavicular_r3: default_value=0 range=(-0.17 0.7) clamped=true locked=true
      PhysicalOffsetFrame thorax_offset: socket_parent=/bodyset/thorax translation=(0.00630646 0.00690969 0.0253904)
      PhysicalOffsetFrame clavicle_offset: socket_parent=/bodyset/clavicle translation=(0 0 0)
      SpatialTransform: axes_held_at_zero=(translation1 translation2 translation3)
        TransformAxis rotation1: coordinates=sternoclavicular_r1 axis=(0.0153 0.9892987 -0.1451)
            LinearFunction(coefficients=1 0)
        TransformAxis rotation2: coordinates=sternoclavicular_r2 axis=(-0.9944725 0 -0.104997)
            LinearFunction(coefficients=1 0)
        TransformAxis rotation3: coordinates=sternoclavicular_r3 axis=(-0.103812 0.145416 0.9839092)
            LinearFunction(coefficients=1 0)
    CustomJoint ACJ: socket_parent_frame=clavicle_offset socket_child_frame=scapula_offset
      Coordinate Acromioclavicular_r1: default_value=0 range=(-1.570796 1.570796) clamped=true locked=true
      Coordinate Acromioclavicular_r2: default_value=0 range=(-1.570796 1.570796) clamped=true locked=true
      Coordinate Acromioclavicular_r3: default_value=0 range=(-1.570796 1.570796) clamped=true locked=true
      PhysicalOffsetFrame clavicle_offset: socket_parent=/bodyset/clavicle translation=(-0.0137883 0.0193113 0.130411)
          orientation=(-0.52 0.52 0) [radians]
      PhysicalOffsetFrame scapula_offset: socket_parent=/bodyset/scapula translation=(0 0 0) orientation=(-0.52 0.52 0)
      SpatialTransform: axes_held_at_zero=(translation1 translation2 translation3)
        TransformAxis rotation1: coordinates=Acromioclavicular_r1 axis=(0 0 1) LinearFunction(coefficients=1 0)
        TransformAxis rotation2: coordinates=Acromioclavicular_r2 axis=(0 1 0) LinearFunction(coefficients=1 0)
        TransformAxis rotation3: coordinates=Acromioclavicular_r3 axis=(-1 0 0) LinearFunction(coefficients=1 0)
    CustomJoint GHJ: socket_parent_frame=scapula_offset socket_child_frame=humerus_offset
      Coordinate shoulder_plane: default_value=-1.096049 default_speed_value=5.342924e-15 range=(-1.14 1.14)
          clamped=true
      Coordinate shoulder_ele: default_value=1.155709 range=(-0.3 3) clamped=true
      Coordinate shoulder_rotation: default_value=1.135693 default_speed_value=1.000209e-14 range=(-1.14 1.14)
          clamped=true
      PhysicalOffsetFrame scapula_offset: socket_parent=/bodyset/scapula translation=(-0.00955 -0.034 0.009)
      PhysicalOffsetFrame humerus_offset: socket_parent=/bodyset/humerus translation=(0 0 0)
      SpatialTransform: axes_held_at_zero=(translation1 translation2 translation3)
        TransformAxis rotation1: coordinates=shoulder_plane axis=(0.0001 1 0.0001) LinearFunction(coefficients=1 0)
        TransformAxis rotation2: coordinates=shoulder_ele axis=(0 0 1) LinearFunction(coefficients=1 0)
        TransformAxis rotation3: coordinates=shoulder_rotation axis=(0 1 0) LinearFunction(coefficients=1 0)
    CustomJoint elbow: socket_parent_frame=humerus_offset socket_child_frame=ulna_offset
      Coordinate elbow_flexion: default_value=1.345908 range=(0 2.5) clamped=true
      PhysicalOffsetFrame humerus_offset: socket_parent=/bodyset/humerus translation=(0.00608212 -0.289549 -0.0122639)
      PhysicalOffsetFrame ulna_offset: socket_parent=/bodyset/ulna translation=(0 0 0)
      SpatialTransform: axes_held_at_zero=(rotation1 rotation2 translation1 translation2 translation3)
        TransformAxis rotation3: coordinates=elbow_flexion axis=(0.04940001 0.03660001 0.9981082)
            LinearFunction(coefficients=1 0)
    CustomJoint radioulnar: socket_parent_frame=ulna_offset socket_child_frame=radius_offset
      Coordinate pro_sup: default_value=0.3950369 range=(-1.91986 1.9) clamped=true
      PhysicalOffsetFrame ulna_offset: socket_parent=/bodyset/ulna translation=(0.000408504 -0.0117475 0.0204242)
      PhysicalOffsetFrame radius_offset: socket_parent=/bodyset/radius translation=(0 0 0)
      SpatialTransform: axes_held_at_zero=(rotation1 rotation3 translation1 translation2 translation3)
        TransformAxis rotation2: coordinates=pro_sup axis=(-0.01716099 0.9926656 -0.119668)
            LinearFunction(coefficients=1 0)
    CustomJoint radius_hand_r: socket_parent_frame=radius_offset socket_child_frame=hand_r_offset
      Coordinate hand_r_Add: default_value=0.04228781 range=(-1.2 1.2) clamped=true
      Coordinate hand_r_Flex: default_value=-0.1003188 range=(-1 1.39626) clamped=true
      PhysicalOffsetFrame radius_offset: socket_parent=/bodyset/radius translation=(0.0174787 -0.234992 0.024276)
      PhysicalOffsetFrame hand_r_offset: socket_parent=/bodyset/hand_r translation=(0 0 0)
      SpatialTransform: axes_held_at_zero=(rotation2 translation1 translation2 translation3)
        TransformAxis rotation1: coordinates=hand_r_Add axis=(0 0 1) LinearFunction(coefficients=1 0)
        TransformAxis rotation3: coordinates=hand_r_Flex axis=(1 0 0) LinearFunction(coefficients=1 0)
    CustomJoint SCJ_left: socket_parent_frame=thorax_offset socket_child_frame=clavicle_left_offset
      Coordinate sternoclavicular_left_r1: default_value=0.02802529 range=(-0.7 0.7) clamped=true
      Coordinate sternoclavicular_left_r2: default_value=-0.008671969 range=(-0.35 0.7) clamped=true
      Coordinate sternoclavicular_left_r3: default_value=0 range=(-0.35 0.7) clamped=true locked=true
      PhysicalOffsetFrame thorax_offset: socket_parent=/bodyset/thorax translation=(0.00630646 0.00690969 -0.0253904)
      PhysicalOffsetFrame clavicle_left_offset: socket_parent=/bodyset/clavicle_left translation=(0 0 0)
      SpatialTransform: axes_held_at_zero=(translation1 translation2 translation3)
        TransformAxis rotation1: coordinates=sternoclavicular_left_r1 axis=(-0.0153 -0.9892987 -0.1451)
            LinearFunction(coefficients=1 0)
        TransformAxis rotation2: coordinates=sternoclavicular_left_r2 axis=(0.9944725 0 -0.104997)
            LinearFunction(coefficients=1 0)
        TransformAxis rotation3: coordinates=sternoclavicular_left_r3 axis=(0.103812 -0.145416 0.9839092)
            LinearFunction(coefficients=1 0)
    CustomJoint ACJ_left: socket_parent_frame=clavicle_left_offset socket_child_frame=scapula_left_offset
      Coordinate Acromioclavicular_left_r1: default_value=0 range=(-3 3) clamped=true locked=true
      Coordinate Acromioclavicular_left_r2: default_value=0 range=(-3 3) clamped=true locked=true
      Coordinate Acromioclavicular_left_r3: default_value=0 range=(-3 3) clamped=true locked=true
      PhysicalOffsetFrame clavicle_left_offset: socket_parent=/bodyset/clavicle_left
          translation=(-0.0137883 0.0193113 -0.130411) orientation=(0.52 -0.52 0)
      PhysicalOffsetFrame scapula_left_offset: socket_parent=/bodyset/scapula_left translation=(0 0 0)
          orientation=(0.52 -0.52 0)
      SpatialTransform: axes_held_at_zero=(translation1 translation2 translation3)
        TransformAxis rotation1: coordinates=Acromioclavicular_left_r1 axis=(0 0 1) LinearFunction(coefficients=1 0)
        TransformAxis rotation2: coordinates=Acromioclavicular_left_r2 axis=(0 -1 0) LinearFunction(coefficients=1 0)
        TransformAxis rotation3: coordinates=Acromioclavicular_left_r3 axis=(1 0 0) LinearFunction(coefficients=1 0)
    CustomJoint GHJ_left: socket_parent_frame=scapula_left_offset socket_child_frame=humerus_left_offset
      Coordinate shoulder_left_plane: default_value=-0.9496019 default_speed_value=5.342924e-15 range=(-1.14 1.14)
          clamped=true
      Coordinate shoulder_left_ele: default_value=1.166405 range=(-0.8 3) clamped=true
      Coordinate shoulder_left_rotation: default_value=1.135554 default_speed_value=1.000209e-14 range=(-1.14 1.14)
          clamped=true
      PhysicalOffsetFrame scapula_left_offset: socket_parent=/bodyset/scapula_left translation=(-0.00955 -0.034 -0.009)
      PhysicalOffsetFrame humerus_left_offset: socket_parent=/bodyset/humerus_left translation=(0 0 0)
      SpatialTransform: axes_held_at_zero=(translation1 translation2 translation3)
        TransformAxis rotation1: coordinates=shoulder_left_plane axis=(-0.0001 -1 0.0001)
            LinearFunction(coefficients=1 0)
        TransformAxis rotation2: coordinates=shoulder_left_ele axis=(0 0 1) LinearFunction(coefficients=1 0)
        TransformAxis rotation3: coordinates=shoulder_left_rotation axis=(0 -1 0) LinearFunction(coefficients=1 0)
    CustomJoint elbow_left: socket_parent_frame=humerus_left_offset socket_child_frame=ulna_left_offset
      Coordinate elbow_left_flexion: default_value=1.391449 range=(0 2.7) clamped=true
      PhysicalOffsetFrame humerus_left_offset: socket_parent=/bodyset/humerus_left
          translation=(0.00608212 -0.289549 0.0122639)
      PhysicalOffsetFrame ulna_left_offset: socket_parent=/bodyset/ulna_left translation=(0 0 0)
      SpatialTransform: axes_held_at_zero=(rotation1 rotation2 translation1 translation2 translation3)
        TransformAxis rotation3: coordinates=elbow_left_flexion axis=(-0.04940001 -0.03660001 0.9981082)
            LinearFunction(coefficients=1 0)
    CustomJoint radioulnar_left: socket_parent_frame=ulna_left_offset socket_child_frame=radius_left_offset
      Coordinate pro_sup_left: default_value=0.7112706 range=(-1.57 1.57) clamped=true
      PhysicalOffsetFrame ulna_left_offset: socket_parent=/bodyset/ulna_left
          translation=(0.000408504 -0.0117475 -0.0204242)
      PhysicalOffsetFrame radius_left_offset: socket_parent=/bodyset/radius_left translation=(0 0 0)
      SpatialTransform: axes_held_at_zero=(rotation1 rotation3 translation1 translation2 translation3)
        TransformAxis rotation2: coordinates=pro_sup_left axis=(0.01716099 -0.9926656 -0.119668)
            LinearFunction(coefficients=1 0)
    CustomJoint radius_hand_left: socket_parent_frame=radius_left_offset socket_child_frame=hand_left_offset
      Coordinate hand_left_Flex: default_value=-0.06650655 range=(-1 1.39626) clamped=true
      Coordinate hand_left_Add: default_value=-0.04079864 range=(-1.2 1.2) clamped=true
      PhysicalOffsetFrame radius_left_offset: socket_parent=/bodyset/radius_left
          translation=(0.0174787 -0.234992 -0.024276) orientation=(0 -1.57 0)
      PhysicalOffsetFrame hand_left_offset: socket_parent=/bodyset/hand_left translation=(0 0 0)
      SpatialTransform: axes_held_at_zero=(rotation2 translation1 translation2 translation3)
        TransformAxis rotation1: coordinates=hand_left_Flex axis=(0 0 1) LinearFunction(coefficients=1 0)
        TransformAxis rotation3: coordinates=hand_left_Add axis=(-1 0 0) LinearFunction(coefficients=1 0)
  MarkerSet:
    Marker ster: thorax (0.01446335 -0.002977836 -0.0005158139)
    Marker xiph: thorax (0.0754249 -0.1685853 0.0006173115)
    Marker c7: thorax (-0.09607272 0.05465619 -0.001855453)
    Marker t10: thorax (-0.1240866 -0.1797219 0.0004889193)
    Marker epic_lat_r: humerus (-0.00946494 -0.273487 0.0307692)
    Marker epic_m_r: humerus (0.0118839 -0.289721 -0.049108)
    Marker styl_r_r: radius (0.0519996 -0.231152 0.0207237)
    Marker styl_u_r: radius (-0.013148 -0.231687 0.0348427)
    Marker scap_r: scapula (-0.04829681 0.0005847801 0.01629396)
    Marker elb_r: ulna (-0.04683649 -0.003362191 0.002112273)
    Marker clav_sc_r: clavicle (0.01270071 0.001192418 0.004323344)
    Marker clav_ac_r: clavicle (-0.01224134 0.03255521 0.1108002)
    Marker clav_sc_l: clavicle_left (0.002821367 0 0)
    Marker clav_ac_l: clavicle_left (-0.019036 0.03338144 -0.1088452)
    Marker scap_l: scapula_left (-0.04692868 0.002963746 -0.01507113)
    Marker epic_lat_l: humerus_left (-0.00158659 -0.284165 -0.0261137)
    Marker epic_m_l: humerus_left (-0.00448261 -0.279179 0.0531062)
    Marker elb_l: ulna_left (-0.04069024 -0.003159573 -0.001425296)
    Marker styl_r_l: radius_left (0.04053484 -0.230296 -0.03823086)
    Marker styl_u_l: ulna_left (-0.013848 -0.241687 -0.0508427)
    Marker head_f: head (0.09335088 0.5922209 -0.001237655)
    Marker head_l: head (0.04605929 0.5681641 -0.07258391)
    Marker head_r: head (0.040266 0.5555851 0.064414)
    Marker p2_l: hand_left (-0.0080123 -0.08746947 -0.0188453)
    Marker p5_l: hand_left (-2.699751e-5 -0.0791501 0.03390254)
    Marker hand_l: hand_left (-0.01227115 -0.05556315 0.00624343) fixed=true
    Marker p5_r: hand_r (-0.02272563 -0.07801807 0.001240962)
    Marker hand_r: hand_r (-0.001225464 -0.04587386 0.02205647)
    Marker p2_r: hand_r (0.02304901 -0.08400809 0.01392713)
    Marker ribs_r: thorax (0.09767609 -0.2468445 0.08358877)
    Marker ribs_l: thorax (0.09170635 -0.246845 -0.08897094)
